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/batch
! ANSYS input file written by Workbench version 18.2 RELEASE
! File used for geometry attach: C:\Users\Saraswathi Andappan\Desktop\ANSYS Cornell\crank_files\dp0\SYS\DM\SYS.agdb
/title,crank--Static Structural (A5)
/com,--- Data in consistent BIN units. See Solving Units in the help system for more information.
/units,BIN
/prep7
! Turn off shape checking because checks already performed inside WB mesher.
! See help system for more information.
SHPP,OFF,,NOWARN
etcon,set             ! allow ANSYS to choose best KEYOP's for 180x elements
/com,*********** Nodes for the whole assembly ***********
nblock,3,,23763
(1i9,3e20.9e3)
        1    6.738195907E+000    3.553406833E-001    0.000000000E+000
        2    6.781930438E+000    4.919182219E-001    0.000000000E+000
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-1
/com,*********** Elements for Body 1 "Bike Crank 2 rev 2011 x.375" ***********
et,1,186
keyo,1,2,1          ! set full integration on SOLID186
eblock,19,solid,,4329
(19i9)
        1        1        1        1        0        0        0        0       20        0        1     5164     5174     4954     4953     5771     5781     5561     5560
    20048    20047    19364    20016     5791    21603    21100    21582    21581    21602    21101    21098
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-1
/com,*********** Send User Defined Coordinate System(s) ***********
local,12,0,3.22109104861841,-1.36592399683213e-016,0.375,-0.,0.,0.
local,13,0,3.22109104861841,0.3310147200658,0.375,-0.,0.,0.
csys,0
toffst,459.67,  ! Temperature offset from absolute zero
/com,*********** Set Reference Temperature ***********
tref,71.6
/com,*********** Send Materials ***********
MP,EX,1,9999999.99889292,	! slinch s^-2 in^-1
MP,NUXY,1,0.33,

!************************* Model Summary ********************
!Bike Crank 2 rev 2011 x.375,	NEU 1,	matid,	1
!************************* End Model Summary ********************
/com,*********** Fixed Supports ***********
CMBLOCK,_FIXEDSU,NODE,     1456
(8i10)
      1353      1354      1355      1356      1357      1358      1359      1360
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
cmsel,s,_FIXEDSU
d,all,all
nsel,all
/com,*********** Define Force Using Surface Effect Elements ***********
local,14,0,0.,0.,0.,-0.,0.,0.
csys,0
et,2,154
eblock,10,,,36
(15i9)
     4330        2        2        2       14      207      155      153      205     6719     6610     6716     6263
     4331        2        2        2       14      171      119      155      207     6644     6614     6719     6262
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-1
esel,s,type,,2
keyop,2,2,1                ! Apply load in local coordinate system
keyop,2,7,1                ! Use original area so load is constant in large deformation
keyop,2,11,2               ! Use real and not project area
esel,all

*DIM,_loadvari67x,TABLE,2,1,1,TIME,
! Time values
_loadvari67x(1,0,1) = 0.
_loadvari67x(2,0,1) = 1.
! Load values
_loadvari67x(1,1,1) = 0.
_loadvari67x(2,1,1) = 0.


*DIM,_loadvari67y,TABLE,2,1,1,TIME,
! Time values
_loadvari67y(1,0,1) = 0.
_loadvari67y(2,0,1) = 1.
! Load values
_loadvari67y(1,1,1) = 0.
_loadvari67y(2,1,1) = 509.328442194509


*DIM,_loadvari67z,TABLE,2,1,1,TIME,
! Time values
_loadvari67z(1,0,1) = 0.
_loadvari67z(2,0,1) = 1.
! Load values
_loadvari67z(1,1,1) = 0.
_loadvari67z(2,1,1) = 0.

fini
/com,****************************************************************************
/com,*************************    SOLUTION       ********************************
/com,****************************************************************************
/solu
antype,0                   ! static analysis
eqsl,pcg,1e-8,,,,,,1
cntr,print,1               ! print out contact info and also make no initial contact an error
dmpoption,emat,no             ! Don't combine emat file for DANSYS
dmpoption,esav,no             ! Don't combine esav file for DANSYS
nldiag,cont,iter           ! print out contact info each equilibrium iteration
rescontrol,,none                 ! Do not keep any restart files
/com,****************************************************
/com,******************* SOLVE FOR LS 1 OF 1 ****************
esel,s,type,,2
nsle
sfe,all,1,pres,1,%_loadvari67x%
sfe,all,2,pres,1,%_loadvari67y%
sfe,all,3,pres,1,%_loadvari67z%
nsel,all
esel,all
nsub,1,1,1
time,1.
outres,erase
outres,all,none
outres,nsol,all
outres,rsol,all
outres,strs,all
outres,epel,all
outres,eppl,all
stabilize,off                   ! Stabilization turned OFF by user
! *********** WB SOLVE COMMAND ***********
! check interactive state
*get,ANSINTER_,active,,int
*if,ANSINTER_,ne,0,then
/eof
*endif
solve
/com *************** Write FE CONNECTORS *********
CEWRITE,file,ce,,INTE
/com,****************************************************
/com,*************** FINISHED SOLVE FOR LS 1 *************
*get,_PCGITER,active,,solu,cgiter
/post1
fini
